*Heading
** Tension buckling with beam spokes
**
** --------------------------------------------------
** -- Nodes
** --------------------------------------------------
*NODE, nset=nsetRim
     1,  0.0000E+00, -3.0000E-01,  4.0000E-05
     2,  1.8114E-02, -2.9945E-01,  3.9020E-05
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*NSET, nset=nsetSpokeNip
     1
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*NODE, nset=nsetSpokes
  1001,  0.0000E+00, -3.0000E-01,  0.0000E+00
  2001,  0.0000E+00, -2.7250E-01,  2.5000E-03
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*NSET, nset=nsetHub
 11001
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*NSET, nset=nsetRig1
     1
  1001
*RIGID BODY, ref node=1, tie nset=nsetRig1
*NSET, nset=nsetRig2
     2
  1002
*RIGID BODY, ref node=2, tie nset=nsetRig2
*NSET, nset=nsetRig3
     3
  1003
*RIGID BODY, ref node=3, tie nset=nsetRig3
*NSET, nset=nsetRig4
     4
  1004
*RIGID BODY, ref node=4, tie nset=nsetRig4
*NSET, nset=nsetRig5
     5
  1005
*RIGID BODY, ref node=5, tie nset=nsetRig5
*NSET, nset=nsetRig6
     6
  1006
*RIGID BODY, ref node=6, tie nset=nsetRig6
*NSET, nset=nsetRig7
     7
  1007
*RIGID BODY, ref node=7, tie nset=nsetRig7
*NSET, nset=nsetRig8
     8
  1008
*RIGID BODY, ref node=8, tie nset=nsetRig8
*NSET, nset=nsetRig9
     9
  1009
*RIGID BODY, ref node=9, tie nset=nsetRig9
*NSET, nset=nsetRig10
    10
  1010
*RIGID BODY, ref node=10, tie nset=nsetRig10
*NSET, nset=nsetRig11
    11
  1011
*RIGID BODY, ref node=11, tie nset=nsetRig11
*NSET, nset=nsetRig12
    12
  1012
*RIGID BODY, ref node=12, tie nset=nsetRig12
*NSET, nset=nsetRig13
    13
  1013
*RIGID BODY, ref node=13, tie nset=nsetRig13
*NSET, nset=nsetRig14
    14
  1014
*RIGID BODY, ref node=14, tie nset=nsetRig14
*NSET, nset=nsetRig15
    15
  1015
*RIGID BODY, ref node=15, tie nset=nsetRig15
*NSET, nset=nsetRig16
    16
  1016
*RIGID BODY, ref node=16, tie nset=nsetRig16
*NSET, nset=nsetRig17
    17
  1017
*RIGID BODY, ref node=17, tie nset=nsetRig17
*NSET, nset=nsetRig18
    18
  1018
*RIGID BODY, ref node=18, tie nset=nsetRig18
*NSET, nset=nsetRig19
    19
  1019
*RIGID BODY, ref node=19, tie nset=nsetRig19
*NSET, nset=nsetRig20
    20
  1020
*RIGID BODY, ref node=20, tie nset=nsetRig20
*NSET, nset=nsetRig21
    21
  1021
*RIGID BODY, ref node=21, tie nset=nsetRig21
*NSET, nset=nsetRig22
    22
  1022
*RIGID BODY, ref node=22, tie nset=nsetRig22
*NSET, nset=nsetRig23
    23
  1023
*RIGID BODY, ref node=23, tie nset=nsetRig23
*NSET, nset=nsetRig24
    24
  1024
*RIGID BODY, ref node=24, tie nset=nsetRig24
*NSET, nset=nsetRig25
    25
  1025
*RIGID BODY, ref node=25, tie nset=nsetRig25
*NSET, nset=nsetRig26
    26
  1026
*RIGID BODY, ref node=26, tie nset=nsetRig26
*NSET, nset=nsetRig27
    27
  1027
*RIGID BODY, ref node=27, tie nset=nsetRig27
*NSET, nset=nsetRig28
    28
  1028
*RIGID BODY, ref node=28, tie nset=nsetRig28
*NSET, nset=nsetRig29
    29
  1029
*RIGID BODY, ref node=29, tie nset=nsetRig29
*NSET, nset=nsetRig30
    30
  1030
*RIGID BODY, ref node=30, tie nset=nsetRig30
*NSET, nset=nsetRig31
    31
  1031
*RIGID BODY, ref node=31, tie nset=nsetRig31
*NSET, nset=nsetRig32
    32
  1032
*RIGID BODY, ref node=32, tie nset=nsetRig32
*NSET, nset=nsetRig33
    33
  1033
*RIGID BODY, ref node=33, tie nset=nsetRig33
*NSET, nset=nsetRig34
    34
  1034
*RIGID BODY, ref node=34, tie nset=nsetRig34
*NSET, nset=nsetRig35
    35
  1035
*RIGID BODY, ref node=35, tie nset=nsetRig35
*NSET, nset=nsetRig36
    36
  1036
*RIGID BODY, ref node=36, tie nset=nsetRig36
*NSET, nset=nsetRig37
    37
  1037
*RIGID BODY, ref node=37, tie nset=nsetRig37
*NSET, nset=nsetRig38
    38
  1038
*RIGID BODY, ref node=38, tie nset=nsetRig38
*NSET, nset=nsetRig39
    39
  1039
*RIGID BODY, ref node=39, tie nset=nsetRig39
*NSET, nset=nsetRig40
    40
  1040
*RIGID BODY, ref node=40, tie nset=nsetRig40
*NSET, nset=nsetRig41
    41
  1041
*RIGID BODY, ref node=41, tie nset=nsetRig41
*NSET, nset=nsetRig42
    42
  1042
*RIGID BODY, ref node=42, tie nset=nsetRig42
*NSET, nset=nsetRig43
    43
  1043
*RIGID BODY, ref node=43, tie nset=nsetRig43
*NSET, nset=nsetRig44
    44
  1044
*RIGID BODY, ref node=44, tie nset=nsetRig44
*NSET, nset=nsetRig45
    45
  1045
*RIGID BODY, ref node=45, tie nset=nsetRig45
*NSET, nset=nsetRig46
    46
  1046
*RIGID BODY, ref node=46, tie nset=nsetRig46
*NSET, nset=nsetRig47
    47
  1047
*RIGID BODY, ref node=47, tie nset=nsetRig47
*NSET, nset=nsetRig48
    48
  1048
*RIGID BODY, ref node=48, tie nset=nsetRig48
*NSET, nset=nsetRig49
    49
  1049
*RIGID BODY, ref node=49, tie nset=nsetRig49
*NSET, nset=nsetRig50
    50
  1050
*RIGID BODY, ref node=50, tie nset=nsetRig50
*NSET, nset=nsetRig51
    51
  1051
*RIGID BODY, ref node=51, tie nset=nsetRig51
*NSET, nset=nsetRig52
    52
  1052
*RIGID BODY, ref node=52, tie nset=nsetRig52
*NSET, nset=nsetRig53
    53
  1053
*RIGID BODY, ref node=53, tie nset=nsetRig53
*NSET, nset=nsetRig54
    54
  1054
*RIGID BODY, ref node=54, tie nset=nsetRig54
*NSET, nset=nsetRig55
    55
  1055
*RIGID BODY, ref node=55, tie nset=nsetRig55
*NSET, nset=nsetRig56
    56
  1056
*RIGID BODY, ref node=56, tie nset=nsetRig56
*NSET, nset=nsetRig57
    57
  1057
*RIGID BODY, ref node=57, tie nset=nsetRig57
*NSET, nset=nsetRig58
    58
  1058
*RIGID BODY, ref node=58, tie nset=nsetRig58
*NSET, nset=nsetRig59
    59
  1059
*RIGID BODY, ref node=59, tie nset=nsetRig59
*NSET, nset=nsetRig60
    60
  1060
*RIGID BODY, ref node=60, tie nset=nsetRig60
*NSET, nset=nsetRig61
    61
  1061
*RIGID BODY, ref node=61, tie nset=nsetRig61
*NSET, nset=nsetRig62
    62
  1062
*RIGID BODY, ref node=62, tie nset=nsetRig62
*NSET, nset=nsetRig63
    63
  1063
*RIGID BODY, ref node=63, tie nset=nsetRig63
*NSET, nset=nsetRig64
    64
  1064
*RIGID BODY, ref node=64, tie nset=nsetRig64
*NSET, nset=nsetRig65
    65
  1065
*RIGID BODY, ref node=65, tie nset=nsetRig65
*NSET, nset=nsetRig66
    66
  1066
*RIGID BODY, ref node=66, tie nset=nsetRig66
*NSET, nset=nsetRig67
    67
  1067
*RIGID BODY, ref node=67, tie nset=nsetRig67
*NSET, nset=nsetRig68
    68
  1068
*RIGID BODY, ref node=68, tie nset=nsetRig68
*NSET, nset=nsetRig69
    69
  1069
*RIGID BODY, ref node=69, tie nset=nsetRig69
*NSET, nset=nsetRig70
    70
  1070
*RIGID BODY, ref node=70, tie nset=nsetRig70
*NSET, nset=nsetRig71
    71
  1071
*RIGID BODY, ref node=71, tie nset=nsetRig71
*NSET, nset=nsetRig72
    72
  1072
*RIGID BODY, ref node=72, tie nset=nsetRig72
*NSET, nset=nsetRig73
    73
  1073
*RIGID BODY, ref node=73, tie nset=nsetRig73
*NSET, nset=nsetRig74
    74
  1074
*RIGID BODY, ref node=74, tie nset=nsetRig74
*NSET, nset=nsetRig75
    75
  1075
*RIGID BODY, ref node=75, tie nset=nsetRig75
*NSET, nset=nsetRig76
    76
  1076
*RIGID BODY, ref node=76, tie nset=nsetRig76
*NSET, nset=nsetRig77
    77
  1077
*RIGID BODY, ref node=77, tie nset=nsetRig77
*NSET, nset=nsetRig78
    78
  1078
*RIGID BODY, ref node=78, tie nset=nsetRig78
*NSET, nset=nsetRig79
    79
  1079
*RIGID BODY, ref node=79, tie nset=nsetRig79
*NSET, nset=nsetRig80
    80
  1080
*RIGID BODY, ref node=80, tie nset=nsetRig80
*NSET, nset=nsetRig81
    81
  1081
*RIGID BODY, ref node=81, tie nset=nsetRig81
*NSET, nset=nsetRig82
    82
  1082
*RIGID BODY, ref node=82, tie nset=nsetRig82
*NSET, nset=nsetRig83
    83
  1083
*RIGID BODY, ref node=83, tie nset=nsetRig83
*NSET, nset=nsetRig84
    84
  1084
*RIGID BODY, ref node=84, tie nset=nsetRig84
*NSET, nset=nsetRig85
    85
  1085
*RIGID BODY, ref node=85, tie nset=nsetRig85
*NSET, nset=nsetRig86
    86
  1086
*RIGID BODY, ref node=86, tie nset=nsetRig86
*NSET, nset=nsetRig87
    87
  1087
*RIGID BODY, ref node=87, tie nset=nsetRig87
*NSET, nset=nsetRig88
    88
  1088
*RIGID BODY, ref node=88, tie nset=nsetRig88
*NSET, nset=nsetRig89
    89
  1089
*RIGID BODY, ref node=89, tie nset=nsetRig89
*NSET, nset=nsetRig90
    90
  1090
*RIGID BODY, ref node=90, tie nset=nsetRig90
*NSET, nset=nsetRig91
    91
  1091
*RIGID BODY, ref node=91, tie nset=nsetRig91
*NSET, nset=nsetRig92
    92
  1092
*RIGID BODY, ref node=92, tie nset=nsetRig92
*NSET, nset=nsetRig93
    93
  1093
*RIGID BODY, ref node=93, tie nset=nsetRig93
*NSET, nset=nsetRig94
    94
  1094
*RIGID BODY, ref node=94, tie nset=nsetRig94
*NSET, nset=nsetRig95
    95
  1095
*RIGID BODY, ref node=95, tie nset=nsetRig95
*NSET, nset=nsetRig96
    96
  1096
*RIGID BODY, ref node=96, tie nset=nsetRig96
*NSET, nset=nsetRig97
    97
  1097
*RIGID BODY, ref node=97, tie nset=nsetRig97
*NSET, nset=nsetRig98
    98
  1098
*RIGID BODY, ref node=98, tie nset=nsetRig98
*NSET, nset=nsetRig99
    99
  1099
*RIGID BODY, ref node=99, tie nset=nsetRig99
*NSET, nset=nsetRig100
   100
  1100
*RIGID BODY, ref node=100, tie nset=nsetRig100
*NSET, nset=nsetRig101
   101
  1101
*RIGID BODY, ref node=101, tie nset=nsetRig101
*NSET, nset=nsetRig102
   102
  1102
*RIGID BODY, ref node=102, tie nset=nsetRig102
*NSET, nset=nsetRig103
   103
  1103
*RIGID BODY, ref node=103, tie nset=nsetRig103
*NSET, nset=nsetRig104
   104
  1104
*RIGID BODY, ref node=104, tie nset=nsetRig104
** --------------------------------------------------
** -- Elements
** --------------------------------------------------
*ELEMENT, type=B31, elset=elsetRim
     1,     1,     2
   104,   104,     1
*ELGEN, elset=elsetRim
     1,   103
*ELEMENT, type=B31, elset=elsetSpokes1
1001, 1001, 2001
*ELGEN, elset=elsetSpokes1
1001, 10, 1000, 1000
*ELEMENT, type=B31, elset=elsetSpokes2
1002, 1002, 2002
*ELGEN, elset=elsetSpokes2
1002, 10, 1000, 1000
*ELEMENT, type=B31, elset=elsetSpokes1
1003, 1003, 2003
*ELGEN, elset=elsetSpokes1
1003, 10, 1000, 1000
*ELEMENT, type=B31, elset=elsetSpokes2
1004, 1004, 2004
*ELGEN, elset=elsetSpokes2
1004, 10, 1000, 1000
*ELEMENT, type=B31, elset=elsetSpokes1
1005, 1005, 2005
*ELGEN, elset=elsetSpokes1
1005, 10, 1000, 1000
*ELEMENT, type=B31, elset=elsetSpokes2
1006, 1006, 2006
*ELGEN, elset=elsetSpokes2
1006, 10, 1000, 1000
*ELEMENT, type=B31, elset=elsetSpokes1
1007, 1007, 2007
*ELGEN, elset=elsetSpokes1
1007, 10, 1000, 1000
*ELEMENT, type=B31, elset=elsetSpokes2
1008, 1008, 2008
*ELGEN, elset=elsetSpokes2
1008, 10, 1000, 1000
*ELEMENT, type=B31, elset=elsetSpokes1
1009, 1009, 2009
*ELGEN, elset=elsetSpokes1
1009, 10, 1000, 1000
*ELEMENT, type=B31, elset=elsetSpokes2
1010, 1010, 2010
*ELGEN, elset=elsetSpokes2
1010, 10, 1000, 1000
*ELEMENT, type=B31, elset=elsetSpokes1
1011, 1011, 2011
*ELGEN, elset=elsetSpokes1
1011, 10, 1000, 1000
*ELEMENT, type=B31, elset=elsetSpokes2
1012, 1012, 2012
*ELGEN, elset=elsetSpokes2
1012, 10, 1000, 1000
*ELEMENT, type=B31, elset=elsetSpokes1
1013, 1013, 2013
*ELGEN, elset=elsetSpokes1
1013, 10, 1000, 1000
*ELEMENT, type=B31, elset=elsetSpokes2
1014, 1014, 2014
*ELGEN, elset=elsetSpokes2
1014, 10, 1000, 1000
*ELEMENT, type=B31, elset=elsetSpokes1
1015, 1015, 2015
*ELGEN, elset=elsetSpokes1
1015, 10, 1000, 1000
*ELEMENT, type=B31, elset=elsetSpokes2
1016, 1016, 2016
*ELGEN, elset=elsetSpokes2
1016, 10, 1000, 1000
*ELEMENT, type=B31, elset=elsetSpokes1
1017, 1017, 2017
*ELGEN, elset=elsetSpokes1
1017, 10, 1000, 1000
*ELEMENT, type=B31, elset=elsetSpokes2
1018, 1018, 2018
*ELGEN, elset=elsetSpokes2
1018, 10, 1000, 1000
*ELEMENT, type=B31, elset=elsetSpokes1
1019, 1019, 2019
*ELGEN, elset=elsetSpokes1
1019, 10, 1000, 1000
*ELEMENT, type=B31, elset=elsetSpokes2
1020, 1020, 2020
*ELGEN, elset=elsetSpokes2
1020, 10, 1000, 1000
*ELEMENT, type=B31, elset=elsetSpokes1
1021, 1021, 2021
*ELGEN, elset=elsetSpokes1
1021, 10, 1000, 1000
*ELEMENT, type=B31, elset=elsetSpokes2
1022, 1022, 2022
*ELGEN, elset=elsetSpokes2
1022, 10, 1000, 1000
*ELEMENT, type=B31, elset=elsetSpokes1
1023, 1023, 2023
*ELGEN, elset=elsetSpokes1
1023, 10, 1000, 1000
*ELEMENT, type=B31, elset=elsetSpokes2
1024, 1024, 2024
*ELGEN, elset=elsetSpokes2
1024, 10, 1000, 1000
*ELEMENT, type=B31, elset=elsetSpokes1
1025, 1025, 2025
*ELGEN, elset=elsetSpokes1
1025, 10, 1000, 1000
*ELEMENT, type=B31, elset=elsetSpokes2
1026, 1026, 2026
*ELGEN, elset=elsetSpokes2
1026, 10, 1000, 1000
*ELEMENT, type=B31, elset=elsetSpokes1
1027, 1027, 2027
*ELGEN, elset=elsetSpokes1
1027, 10, 1000, 1000
*ELEMENT, type=B31, elset=elsetSpokes2
1028, 1028, 2028
*ELGEN, elset=elsetSpokes2
1028, 10, 1000, 1000
*ELEMENT, type=B31, elset=elsetSpokes1
1029, 1029, 2029
*ELGEN, elset=elsetSpokes1
1029, 10, 1000, 1000
*ELEMENT, type=B31, elset=elsetSpokes2
1030, 1030, 2030
*ELGEN, elset=elsetSpokes2
1030, 10, 1000, 1000
*ELEMENT, type=B31, elset=elsetSpokes1
1031, 1031, 2031
*ELGEN, elset=elsetSpokes1
1031, 10, 1000, 1000
*ELEMENT, type=B31, elset=elsetSpokes2
1032, 1032, 2032
*ELGEN, elset=elsetSpokes2
1032, 10, 1000, 1000
*ELEMENT, type=B31, elset=elsetSpokes1
1033, 1033, 2033
*ELGEN, elset=elsetSpokes1
1033, 10, 1000, 1000
*ELEMENT, type=B31, elset=elsetSpokes2
1034, 1034, 2034
*ELGEN, elset=elsetSpokes2
1034, 10, 1000, 1000
*ELEMENT, type=B31, elset=elsetSpokes1
1035, 1035, 2035
*ELGEN, elset=elsetSpokes1
1035, 10, 1000, 1000
*ELEMENT, type=B31, elset=elsetSpokes2
1036, 1036, 2036
*ELGEN, elset=elsetSpokes2
1036, 10, 1000, 1000
*ELEMENT, type=B31, elset=elsetSpokes1
1037, 1037, 2037
*ELGEN, elset=elsetSpokes1
1037, 10, 1000, 1000
*ELEMENT, type=B31, elset=elsetSpokes2
1038, 1038, 2038
*ELGEN, elset=elsetSpokes2
1038, 10, 1000, 1000
*ELEMENT, type=B31, elset=elsetSpokes1
1039, 1039, 2039
*ELGEN, elset=elsetSpokes1
1039, 10, 1000, 1000
*ELEMENT, type=B31, elset=elsetSpokes2
1040, 1040, 2040
*ELGEN, elset=elsetSpokes2
1040, 10, 1000, 1000
*ELEMENT, type=B31, elset=elsetSpokes1
1041, 1041, 2041
*ELGEN, elset=elsetSpokes1
1041, 10, 1000, 1000
*ELEMENT, type=B31, elset=elsetSpokes2
1042, 1042, 2042
*ELGEN, elset=elsetSpokes2
1042, 10, 1000, 1000
*ELEMENT, type=B31, elset=elsetSpokes1
1043, 1043, 2043
*ELGEN, elset=elsetSpokes1
1043, 10, 1000, 1000
*ELEMENT, type=B31, elset=elsetSpokes2
1044, 1044, 2044
*ELGEN, elset=elsetSpokes2
1044, 10, 1000, 1000
*ELEMENT, type=B31, elset=elsetSpokes1
1045, 1045, 2045
*ELGEN, elset=elsetSpokes1
1045, 10, 1000, 1000
*ELEMENT, type=B31, elset=elsetSpokes2
1046, 1046, 2046
*ELGEN, elset=elsetSpokes2
1046, 10, 1000, 1000
*ELEMENT, type=B31, elset=elsetSpokes1
1047, 1047, 2047
*ELGEN, elset=elsetSpokes1
1047, 10, 1000, 1000
*ELEMENT, type=B31, elset=elsetSpokes2
1048, 1048, 2048
*ELGEN, elset=elsetSpokes2
1048, 10, 1000, 1000
*ELEMENT, type=B31, elset=elsetSpokes1
1049, 1049, 2049
*ELGEN, elset=elsetSpokes1
1049, 10, 1000, 1000
*ELEMENT, type=B31, elset=elsetSpokes2
1050, 1050, 2050
*ELGEN, elset=elsetSpokes2
1050, 10, 1000, 1000
*ELEMENT, type=B31, elset=elsetSpokes1
1051, 1051, 2051
*ELGEN, elset=elsetSpokes1
1051, 10, 1000, 1000
*ELEMENT, type=B31, elset=elsetSpokes2
1052, 1052, 2052
*ELGEN, elset=elsetSpokes2
1052, 10, 1000, 1000
*ELEMENT, type=B31, elset=elsetSpokes1
1053, 1053, 2053
*ELGEN, elset=elsetSpokes1
1053, 10, 1000, 1000
*ELEMENT, type=B31, elset=elsetSpokes2
1054, 1054, 2054
*ELGEN, elset=elsetSpokes2
1054, 10, 1000, 1000
*ELEMENT, type=B31, elset=elsetSpokes1
1055, 1055, 2055
*ELGEN, elset=elsetSpokes1
1055, 10, 1000, 1000
*ELEMENT, type=B31, elset=elsetSpokes2
1056, 1056, 2056
*ELGEN, elset=elsetSpokes2
1056, 10, 1000, 1000
*ELEMENT, type=B31, elset=elsetSpokes1
1057, 1057, 2057
*ELGEN, elset=elsetSpokes1
1057, 10, 1000, 1000
*ELEMENT, type=B31, elset=elsetSpokes2
1058, 1058, 2058
*ELGEN, elset=elsetSpokes2
1058, 10, 1000, 1000
*ELEMENT, type=B31, elset=elsetSpokes1
1059, 1059, 2059
*ELGEN, elset=elsetSpokes1
1059, 10, 1000, 1000
*ELEMENT, type=B31, elset=elsetSpokes2
1060, 1060, 2060
*ELGEN, elset=elsetSpokes2
1060, 10, 1000, 1000
*ELEMENT, type=B31, elset=elsetSpokes1
1061, 1061, 2061
*ELGEN, elset=elsetSpokes1
1061, 10, 1000, 1000
*ELEMENT, type=B31, elset=elsetSpokes2
1062, 1062, 2062
*ELGEN, elset=elsetSpokes2
1062, 10, 1000, 1000
*ELEMENT, type=B31, elset=elsetSpokes1
1063, 1063, 2063
*ELGEN, elset=elsetSpokes1
1063, 10, 1000, 1000
*ELEMENT, type=B31, elset=elsetSpokes2
1064, 1064, 2064
*ELGEN, elset=elsetSpokes2
1064, 10, 1000, 1000
*ELEMENT, type=B31, elset=elsetSpokes1
1065, 1065, 2065
*ELGEN, elset=elsetSpokes1
1065, 10, 1000, 1000
*ELEMENT, type=B31, elset=elsetSpokes2
1066, 1066, 2066
*ELGEN, elset=elsetSpokes2
1066, 10, 1000, 1000
*ELEMENT, type=B31, elset=elsetSpokes1
1067, 1067, 2067
*ELGEN, elset=elsetSpokes1
1067, 10, 1000, 1000
*ELEMENT, type=B31, elset=elsetSpokes2
1068, 1068, 2068
*ELGEN, elset=elsetSpokes2
1068, 10, 1000, 1000
*ELEMENT, type=B31, elset=elsetSpokes1
1069, 1069, 2069
*ELGEN, elset=elsetSpokes1
1069, 10, 1000, 1000
*ELEMENT, type=B31, elset=elsetSpokes2
1070, 1070, 2070
*ELGEN, elset=elsetSpokes2
1070, 10, 1000, 1000
*ELEMENT, type=B31, elset=elsetSpokes1
1071, 1071, 2071
*ELGEN, elset=elsetSpokes1
1071, 10, 1000, 1000
*ELEMENT, type=B31, elset=elsetSpokes2
1072, 1072, 2072
*ELGEN, elset=elsetSpokes2
1072, 10, 1000, 1000
*ELEMENT, type=B31, elset=elsetSpokes1
1073, 1073, 2073
*ELGEN, elset=elsetSpokes1
1073, 10, 1000, 1000
*ELEMENT, type=B31, elset=elsetSpokes2
1074, 1074, 2074
*ELGEN, elset=elsetSpokes2
1074, 10, 1000, 1000
*ELEMENT, type=B31, elset=elsetSpokes1
1075, 1075, 2075
*ELGEN, elset=elsetSpokes1
1075, 10, 1000, 1000
*ELEMENT, type=B31, elset=elsetSpokes2
1076, 1076, 2076
*ELGEN, elset=elsetSpokes2
1076, 10, 1000, 1000
*ELEMENT, type=B31, elset=elsetSpokes1
1077, 1077, 2077
*ELGEN, elset=elsetSpokes1
1077, 10, 1000, 1000
*ELEMENT, type=B31, elset=elsetSpokes2
1078, 1078, 2078
*ELGEN, elset=elsetSpokes2
1078, 10, 1000, 1000
*ELEMENT, type=B31, elset=elsetSpokes1
1079, 1079, 2079
*ELGEN, elset=elsetSpokes1
1079, 10, 1000, 1000
*ELEMENT, type=B31, elset=elsetSpokes2
1080, 1080, 2080
*ELGEN, elset=elsetSpokes2
1080, 10, 1000, 1000
*ELEMENT, type=B31, elset=elsetSpokes1
1081, 1081, 2081
*ELGEN, elset=elsetSpokes1
1081, 10, 1000, 1000
*ELEMENT, type=B31, elset=elsetSpokes2
1082, 1082, 2082
*ELGEN, elset=elsetSpokes2
1082, 10, 1000, 1000
*ELEMENT, type=B31, elset=elsetSpokes1
1083, 1083, 2083
*ELGEN, elset=elsetSpokes1
1083, 10, 1000, 1000
*ELEMENT, type=B31, elset=elsetSpokes2
1084, 1084, 2084
*ELGEN, elset=elsetSpokes2
1084, 10, 1000, 1000
*ELEMENT, type=B31, elset=elsetSpokes1
1085, 1085, 2085
*ELGEN, elset=elsetSpokes1
1085, 10, 1000, 1000
*ELEMENT, type=B31, elset=elsetSpokes2
1086, 1086, 2086
*ELGEN, elset=elsetSpokes2
1086, 10, 1000, 1000
*ELEMENT, type=B31, elset=elsetSpokes1
1087, 1087, 2087
*ELGEN, elset=elsetSpokes1
1087, 10, 1000, 1000
*ELEMENT, type=B31, elset=elsetSpokes2
1088, 1088, 2088
*ELGEN, elset=elsetSpokes2
1088, 10, 1000, 1000
*ELEMENT, type=B31, elset=elsetSpokes1
1089, 1089, 2089
*ELGEN, elset=elsetSpokes1
1089, 10, 1000, 1000
*ELEMENT, type=B31, elset=elsetSpokes2
1090, 1090, 2090
*ELGEN, elset=elsetSpokes2
1090, 10, 1000, 1000
*ELEMENT, type=B31, elset=elsetSpokes1
1091, 1091, 2091
*ELGEN, elset=elsetSpokes1
1091, 10, 1000, 1000
*ELEMENT, type=B31, elset=elsetSpokes2
1092, 1092, 2092
*ELGEN, elset=elsetSpokes2
1092, 10, 1000, 1000
*ELEMENT, type=B31, elset=elsetSpokes1
1093, 1093, 2093
*ELGEN, elset=elsetSpokes1
1093, 10, 1000, 1000
*ELEMENT, type=B31, elset=elsetSpokes2
1094, 1094, 2094
*ELGEN, elset=elsetSpokes2
1094, 10, 1000, 1000
*ELEMENT, type=B31, elset=elsetSpokes1
1095, 1095, 2095
*ELGEN, elset=elsetSpokes1
1095, 10, 1000, 1000
*ELEMENT, type=B31, elset=elsetSpokes2
1096, 1096, 2096
*ELGEN, elset=elsetSpokes2
1096, 10, 1000, 1000
*ELEMENT, type=B31, elset=elsetSpokes1
1097, 1097, 2097
*ELGEN, elset=elsetSpokes1
1097, 10, 1000, 1000
*ELEMENT, type=B31, elset=elsetSpokes2
1098, 1098, 2098
*ELGEN, elset=elsetSpokes2
1098, 10, 1000, 1000
*ELEMENT, type=B31, elset=elsetSpokes1
1099, 1099, 2099
*ELGEN, elset=elsetSpokes1
1099, 10, 1000, 1000
*ELEMENT, type=B31, elset=elsetSpokes2
1100, 1100, 2100
*ELGEN, elset=elsetSpokes2
1100, 10, 1000, 1000
*ELEMENT, type=B31, elset=elsetSpokes1
1101, 1101, 2101
*ELGEN, elset=elsetSpokes1
1101, 10, 1000, 1000
*ELEMENT, type=B31, elset=elsetSpokes2
1102, 1102, 2102
*ELGEN, elset=elsetSpokes2
1102, 10, 1000, 1000
*ELEMENT, type=B31, elset=elsetSpokes1
1103, 1103, 2103
*ELGEN, elset=elsetSpokes1
1103, 10, 1000, 1000
*ELEMENT, type=B31, elset=elsetSpokes2
1104, 1104, 2104
*ELGEN, elset=elsetSpokes2
1104, 10, 1000, 1000
*ELSET, elset=elsetSpokes
elsetSpokes1, elsetSpokes2
*ELSET, elset=elsetSpokesRef, generate
 1001, 1104, 1
** --------------------------------------------------
** -- Sections
** --------------------------------------------------
*BEAM SECTION, elset=elsetSpokes1, material=steel1, section=CIRC
2.877172e-04
0.,0.,-1.
*BEAM SECTION, elset=elsetSpokes2, material=steel2, section=CIRC
2.877172e-04
0.,0.,-1.
*MATERIAL, name=steel1
*ELASTIC
 2.000000e+11, 0.33
*DENSITY
 8050.0
*DAMPING, alpha=1.000000e+03
*EXPANSION, type=iso
 3.663810e-03
*MATERIAL, name=steel2
*ELASTIC
 2.000000e+11, 0.33
*DENSITY
 8050.0
*DAMPING, alpha=1.000000e+03
*EXPANSION, type=iso
 3.663810e-03
*BEAM GENERAL SECTION, elset=elsetRim, section=GENERAL, density=2700.0
1.0000E-04, 1.0000E-09, 0., 1.0000E-09, 1.2318E-10, 0.0000E+00, 0.0000E+00
0.,0.,-1.
6.9000e+10,    2.6e+10
** --------------------------------------------------
** -- Boundary conditions
** --------------------------------------------------
*BOUNDARY
 nsetHub, ENCASTRE
** --------------------------------------------------
** -- Apply tension
** --------------------------------------------------
*STEP, name=buckle, nlgeom=yes
*STATIC
 1.0e-3, , , 2.0e-2
*TEMPERATURE
nsetSpokes, -1.500000e+00
*OUTPUT, field, variable=PRESELECT
*ELEMENT OUTPUT, elset=elsetSpokes
SF
*ELEMENT OUTPUT, elset=elsetRim
SF
*OUTPUT, history, variable=PRESELECT
*END STEP
