*Heading
** Radial collapse with truss spokes
**
** --------------------------------------------------
** -- Nodes
** --------------------------------------------------
*NODE, nset=nsetRim
     1,  0.0000E+00, -6.0000E-01,  3.0000E-05
     2,  5.8810E-02, -5.9711E-01,  2.9329E-05
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*NSET, nset=nsetSpokeNip
     1
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*NODE, nset=nsetSpokes
  1001,  0.0000E+00, -6.0000E-01,  0.0000E+00
  2001,  0.0000E+00, -2.5000E-02,  4.5000E-02
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*NSET, nset=nsetHub
 2001
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*NODE, nset=nsetPreT
 99001,  0.0000E+00,  0.0000E+00,  0.0000E+00
 99002,  0.0000E+00,  0.0000E+00,  0.0000E+00
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*NSET, nset=nsetRig1
     1
  1001
  1002
*RIGID BODY, ref node=1, tie nset=nsetRig1
*NSET, nset=nsetRig2
     2
  1003
  1004
*RIGID BODY, ref node=2, tie nset=nsetRig2
*NSET, nset=nsetRig3
     3
  1005
  1006
*RIGID BODY, ref node=3, tie nset=nsetRig3
*NSET, nset=nsetRig4
     4
  1007
  1008
*RIGID BODY, ref node=4, tie nset=nsetRig4
*NSET, nset=nsetRig5
     5
  1009
  1010
*RIGID BODY, ref node=5, tie nset=nsetRig5
*NSET, nset=nsetRig6
     6
  1011
  1012
*RIGID BODY, ref node=6, tie nset=nsetRig6
*NSET, nset=nsetRig7
     7
  1013
  1014
*RIGID BODY, ref node=7, tie nset=nsetRig7
*NSET, nset=nsetRig8
     8
  1015
  1016
*RIGID BODY, ref node=8, tie nset=nsetRig8
*NSET, nset=nsetRig9
     9
  1017
  1018
*RIGID BODY, ref node=9, tie nset=nsetRig9
*NSET, nset=nsetRig10
    10
  1019
  1020
*RIGID BODY, ref node=10, tie nset=nsetRig10
*NSET, nset=nsetRig11
    11
  1021
  1022
*RIGID BODY, ref node=11, tie nset=nsetRig11
*NSET, nset=nsetRig12
    12
  1023
  1024
*RIGID BODY, ref node=12, tie nset=nsetRig12
*NSET, nset=nsetRig13
    13
  1025
  1026
*RIGID BODY, ref node=13, tie nset=nsetRig13
*NSET, nset=nsetRig14
    14
  1027
  1028
*RIGID BODY, ref node=14, tie nset=nsetRig14
*NSET, nset=nsetRig15
    15
  1029
  1030
*RIGID BODY, ref node=15, tie nset=nsetRig15
*NSET, nset=nsetRig16
    16
  1031
  1032
*RIGID BODY, ref node=16, tie nset=nsetRig16
*NSET, nset=nsetRig17
    17
  1033
  1034
*RIGID BODY, ref node=17, tie nset=nsetRig17
*NSET, nset=nsetRig18
    18
  1035
  1036
*RIGID BODY, ref node=18, tie nset=nsetRig18
*NSET, nset=nsetRig19
    19
  1037
  1038
*RIGID BODY, ref node=19, tie nset=nsetRig19
*NSET, nset=nsetRig20
    20
  1039
  1040
*RIGID BODY, ref node=20, tie nset=nsetRig20
*NSET, nset=nsetRig21
    21
  1041
  1042
*RIGID BODY, ref node=21, tie nset=nsetRig21
*NSET, nset=nsetRig22
    22
  1043
  1044
*RIGID BODY, ref node=22, tie nset=nsetRig22
*NSET, nset=nsetRig23
    23
  1045
  1046
*RIGID BODY, ref node=23, tie nset=nsetRig23
*NSET, nset=nsetRig24
    24
  1047
  1048
*RIGID BODY, ref node=24, tie nset=nsetRig24
*NSET, nset=nsetRig25
    25
  1049
  1050
*RIGID BODY, ref node=25, tie nset=nsetRig25
*NSET, nset=nsetRig26
    26
  1051
  1052
*RIGID BODY, ref node=26, tie nset=nsetRig26
*NSET, nset=nsetRig27
    27
  1053
  1054
*RIGID BODY, ref node=27, tie nset=nsetRig27
*NSET, nset=nsetRig28
    28
  1055
  1056
*RIGID BODY, ref node=28, tie nset=nsetRig28
*NSET, nset=nsetRig29
    29
  1057
  1058
*RIGID BODY, ref node=29, tie nset=nsetRig29
*NSET, nset=nsetRig30
    30
  1059
  1060
*RIGID BODY, ref node=30, tie nset=nsetRig30
*NSET, nset=nsetRig31
    31
  1061
  1062
*RIGID BODY, ref node=31, tie nset=nsetRig31
*NSET, nset=nsetRig32
    32
  1063
  1064
*RIGID BODY, ref node=32, tie nset=nsetRig32
*NSET, nset=nsetRig33
    33
  1065
  1066
*RIGID BODY, ref node=33, tie nset=nsetRig33
*NSET, nset=nsetRig34
    34
  1067
  1068
*RIGID BODY, ref node=34, tie nset=nsetRig34
*NSET, nset=nsetRig35
    35
  1069
  1070
*RIGID BODY, ref node=35, tie nset=nsetRig35
*NSET, nset=nsetRig36
    36
  1071
  1072
*RIGID BODY, ref node=36, tie nset=nsetRig36
*NSET, nset=nsetRig37
    37
  1073
  1074
*RIGID BODY, ref node=37, tie nset=nsetRig37
*NSET, nset=nsetRig38
    38
  1075
  1076
*RIGID BODY, ref node=38, tie nset=nsetRig38
*NSET, nset=nsetRig39
    39
  1077
  1078
*RIGID BODY, ref node=39, tie nset=nsetRig39
*NSET, nset=nsetRig40
    40
  1079
  1080
*RIGID BODY, ref node=40, tie nset=nsetRig40
*NSET, nset=nsetRig41
    41
  1081
  1082
*RIGID BODY, ref node=41, tie nset=nsetRig41
*NSET, nset=nsetRig42
    42
  1083
  1084
*RIGID BODY, ref node=42, tie nset=nsetRig42
*NSET, nset=nsetRig43
    43
  1085
  1086
*RIGID BODY, ref node=43, tie nset=nsetRig43
*NSET, nset=nsetRig44
    44
  1087
  1088
*RIGID BODY, ref node=44, tie nset=nsetRig44
*NSET, nset=nsetRig45
    45
  1089
  1090
*RIGID BODY, ref node=45, tie nset=nsetRig45
*NSET, nset=nsetRig46
    46
  1091
  1092
*RIGID BODY, ref node=46, tie nset=nsetRig46
*NSET, nset=nsetRig47
    47
  1093
  1094
*RIGID BODY, ref node=47, tie nset=nsetRig47
*NSET, nset=nsetRig48
    48
  1095
  1096
*RIGID BODY, ref node=48, tie nset=nsetRig48
*NSET, nset=nsetRig49
    49
  1097
  1098
*RIGID BODY, ref node=49, tie nset=nsetRig49
*NSET, nset=nsetRig50
    50
  1099
  1100
*RIGID BODY, ref node=50, tie nset=nsetRig50
*NSET, nset=nsetRig51
    51
  1101
  1102
*RIGID BODY, ref node=51, tie nset=nsetRig51
*NSET, nset=nsetRig52
    52
  1103
  1104
*RIGID BODY, ref node=52, tie nset=nsetRig52
*NSET, nset=nsetRig53
    53
  1105
  1106
*RIGID BODY, ref node=53, tie nset=nsetRig53
*NSET, nset=nsetRig54
    54
  1107
  1108
*RIGID BODY, ref node=54, tie nset=nsetRig54
*NSET, nset=nsetRig55
    55
  1109
  1110
*RIGID BODY, ref node=55, tie nset=nsetRig55
*NSET, nset=nsetRig56
    56
  1111
  1112
*RIGID BODY, ref node=56, tie nset=nsetRig56
*NSET, nset=nsetRig57
    57
  1113
  1114
*RIGID BODY, ref node=57, tie nset=nsetRig57
*NSET, nset=nsetRig58
    58
  1115
  1116
*RIGID BODY, ref node=58, tie nset=nsetRig58
*NSET, nset=nsetRig59
    59
  1117
  1118
*RIGID BODY, ref node=59, tie nset=nsetRig59
*NSET, nset=nsetRig60
    60
  1119
  1120
*RIGID BODY, ref node=60, tie nset=nsetRig60
*NSET, nset=nsetRig61
    61
  1121
  1122
*RIGID BODY, ref node=61, tie nset=nsetRig61
*NSET, nset=nsetRig62
    62
  1123
  1124
*RIGID BODY, ref node=62, tie nset=nsetRig62
*NSET, nset=nsetRig63
    63
  1125
  1126
*RIGID BODY, ref node=63, tie nset=nsetRig63
*NSET, nset=nsetRig64
    64
  1127
  1128
*RIGID BODY, ref node=64, tie nset=nsetRig64
** --------------------------------------------------
** -- Elements
** --------------------------------------------------
*ELEMENT, type=B31, elset=elsetRim
     1,     1,     2
    64,    64,     1
*ELGEN, elset=elsetRim
     1,    63
*ELEMENT, type=T3D2, elset=elsetSpokes1
1001, 1001, 2001
*ELEMENT, type=T3D2, elset=elsetSpokes2
1002, 1002, 2002
*ELEMENT, type=T3D2, elset=elsetSpokes1
1003, 1003, 2003
*ELEMENT, type=T3D2, elset=elsetSpokes2
1004, 1004, 2004
*ELEMENT, type=T3D2, elset=elsetSpokes1
1005, 1005, 2005
*ELEMENT, type=T3D2, elset=elsetSpokes2
1006, 1006, 2006
*ELEMENT, type=T3D2, elset=elsetSpokes1
1007, 1007, 2007
*ELEMENT, type=T3D2, elset=elsetSpokes2
1008, 1008, 2008
*ELEMENT, type=T3D2, elset=elsetSpokes1
1009, 1009, 2009
*ELEMENT, type=T3D2, elset=elsetSpokes2
1010, 1010, 2010
*ELEMENT, type=T3D2, elset=elsetSpokes1
1011, 1011, 2011
*ELEMENT, type=T3D2, elset=elsetSpokes2
1012, 1012, 2012
*ELEMENT, type=T3D2, elset=elsetSpokes1
1013, 1013, 2013
*ELEMENT, type=T3D2, elset=elsetSpokes2
1014, 1014, 2014
*ELEMENT, type=T3D2, elset=elsetSpokes1
1015, 1015, 2015
*ELEMENT, type=T3D2, elset=elsetSpokes2
1016, 1016, 2016
*ELEMENT, type=T3D2, elset=elsetSpokes1
1017, 1017, 2017
*ELEMENT, type=T3D2, elset=elsetSpokes2
1018, 1018, 2018
*ELEMENT, type=T3D2, elset=elsetSpokes1
1019, 1019, 2019
*ELEMENT, type=T3D2, elset=elsetSpokes2
1020, 1020, 2020
*ELEMENT, type=T3D2, elset=elsetSpokes1
1021, 1021, 2021
*ELEMENT, type=T3D2, elset=elsetSpokes2
1022, 1022, 2022
*ELEMENT, type=T3D2, elset=elsetSpokes1
1023, 1023, 2023
*ELEMENT, type=T3D2, elset=elsetSpokes2
1024, 1024, 2024
*ELEMENT, type=T3D2, elset=elsetSpokes1
1025, 1025, 2025
*ELEMENT, type=T3D2, elset=elsetSpokes2
1026, 1026, 2026
*ELEMENT, type=T3D2, elset=elsetSpokes1
1027, 1027, 2027
*ELEMENT, type=T3D2, elset=elsetSpokes2
1028, 1028, 2028
*ELEMENT, type=T3D2, elset=elsetSpokes1
1029, 1029, 2029
*ELEMENT, type=T3D2, elset=elsetSpokes2
1030, 1030, 2030
*ELEMENT, type=T3D2, elset=elsetSpokes1
1031, 1031, 2031
*ELEMENT, type=T3D2, elset=elsetSpokes2
1032, 1032, 2032
*ELEMENT, type=T3D2, elset=elsetSpokes1
1033, 1033, 2033
*ELEMENT, type=T3D2, elset=elsetSpokes2
1034, 1034, 2034
*ELEMENT, type=T3D2, elset=elsetSpokes1
1035, 1035, 2035
*ELEMENT, type=T3D2, elset=elsetSpokes2
1036, 1036, 2036
*ELEMENT, type=T3D2, elset=elsetSpokes1
1037, 1037, 2037
*ELEMENT, type=T3D2, elset=elsetSpokes2
1038, 1038, 2038
*ELEMENT, type=T3D2, elset=elsetSpokes1
1039, 1039, 2039
*ELEMENT, type=T3D2, elset=elsetSpokes2
1040, 1040, 2040
*ELEMENT, type=T3D2, elset=elsetSpokes1
1041, 1041, 2041
*ELEMENT, type=T3D2, elset=elsetSpokes2
1042, 1042, 2042
*ELEMENT, type=T3D2, elset=elsetSpokes1
1043, 1043, 2043
*ELEMENT, type=T3D2, elset=elsetSpokes2
1044, 1044, 2044
*ELEMENT, type=T3D2, elset=elsetSpokes1
1045, 1045, 2045
*ELEMENT, type=T3D2, elset=elsetSpokes2
1046, 1046, 2046
*ELEMENT, type=T3D2, elset=elsetSpokes1
1047, 1047, 2047
*ELEMENT, type=T3D2, elset=elsetSpokes2
1048, 1048, 2048
*ELEMENT, type=T3D2, elset=elsetSpokes1
1049, 1049, 2049
*ELEMENT, type=T3D2, elset=elsetSpokes2
1050, 1050, 2050
*ELEMENT, type=T3D2, elset=elsetSpokes1
1051, 1051, 2051
*ELEMENT, type=T3D2, elset=elsetSpokes2
1052, 1052, 2052
*ELEMENT, type=T3D2, elset=elsetSpokes1
1053, 1053, 2053
*ELEMENT, type=T3D2, elset=elsetSpokes2
1054, 1054, 2054
*ELEMENT, type=T3D2, elset=elsetSpokes1
1055, 1055, 2055
*ELEMENT, type=T3D2, elset=elsetSpokes2
1056, 1056, 2056
*ELEMENT, type=T3D2, elset=elsetSpokes1
1057, 1057, 2057
*ELEMENT, type=T3D2, elset=elsetSpokes2
1058, 1058, 2058
*ELEMENT, type=T3D2, elset=elsetSpokes1
1059, 1059, 2059
*ELEMENT, type=T3D2, elset=elsetSpokes2
1060, 1060, 2060
*ELEMENT, type=T3D2, elset=elsetSpokes1
1061, 1061, 2061
*ELEMENT, type=T3D2, elset=elsetSpokes2
1062, 1062, 2062
*ELEMENT, type=T3D2, elset=elsetSpokes1
1063, 1063, 2063
*ELEMENT, type=T3D2, elset=elsetSpokes2
1064, 1064, 2064
*ELEMENT, type=T3D2, elset=elsetSpokes1
1065, 1065, 2065
*ELEMENT, type=T3D2, elset=elsetSpokes2
1066, 1066, 2066
*ELEMENT, type=T3D2, elset=elsetSpokes1
1067, 1067, 2067
*ELEMENT, type=T3D2, elset=elsetSpokes2
1068, 1068, 2068
*ELEMENT, type=T3D2, elset=elsetSpokes1
1069, 1069, 2069
*ELEMENT, type=T3D2, elset=elsetSpokes2
1070, 1070, 2070
*ELEMENT, type=T3D2, elset=elsetSpokes1
1071, 1071, 2071
*ELEMENT, type=T3D2, elset=elsetSpokes2
1072, 1072, 2072
*ELEMENT, type=T3D2, elset=elsetSpokes1
1073, 1073, 2073
*ELEMENT, type=T3D2, elset=elsetSpokes2
1074, 1074, 2074
*ELEMENT, type=T3D2, elset=elsetSpokes1
1075, 1075, 2075
*ELEMENT, type=T3D2, elset=elsetSpokes2
1076, 1076, 2076
*ELEMENT, type=T3D2, elset=elsetSpokes1
1077, 1077, 2077
*ELEMENT, type=T3D2, elset=elsetSpokes2
1078, 1078, 2078
*ELEMENT, type=T3D2, elset=elsetSpokes1
1079, 1079, 2079
*ELEMENT, type=T3D2, elset=elsetSpokes2
1080, 1080, 2080
*ELEMENT, type=T3D2, elset=elsetSpokes1
1081, 1081, 2081
*ELEMENT, type=T3D2, elset=elsetSpokes2
1082, 1082, 2082
*ELEMENT, type=T3D2, elset=elsetSpokes1
1083, 1083, 2083
*ELEMENT, type=T3D2, elset=elsetSpokes2
1084, 1084, 2084
*ELEMENT, type=T3D2, elset=elsetSpokes1
1085, 1085, 2085
*ELEMENT, type=T3D2, elset=elsetSpokes2
1086, 1086, 2086
*ELEMENT, type=T3D2, elset=elsetSpokes1
1087, 1087, 2087
*ELEMENT, type=T3D2, elset=elsetSpokes2
1088, 1088, 2088
*ELEMENT, type=T3D2, elset=elsetSpokes1
1089, 1089, 2089
*ELEMENT, type=T3D2, elset=elsetSpokes2
1090, 1090, 2090
*ELEMENT, type=T3D2, elset=elsetSpokes1
1091, 1091, 2091
*ELEMENT, type=T3D2, elset=elsetSpokes2
1092, 1092, 2092
*ELEMENT, type=T3D2, elset=elsetSpokes1
1093, 1093, 2093
*ELEMENT, type=T3D2, elset=elsetSpokes2
1094, 1094, 2094
*ELEMENT, type=T3D2, elset=elsetSpokes1
1095, 1095, 2095
*ELEMENT, type=T3D2, elset=elsetSpokes2
1096, 1096, 2096
*ELEMENT, type=T3D2, elset=elsetSpokes1
1097, 1097, 2097
*ELEMENT, type=T3D2, elset=elsetSpokes2
1098, 1098, 2098
*ELEMENT, type=T3D2, elset=elsetSpokes1
1099, 1099, 2099
*ELEMENT, type=T3D2, elset=elsetSpokes2
1100, 1100, 2100
*ELEMENT, type=T3D2, elset=elsetSpokes1
1101, 1101, 2101
*ELEMENT, type=T3D2, elset=elsetSpokes2
1102, 1102, 2102
*ELEMENT, type=T3D2, elset=elsetSpokes1
1103, 1103, 2103
*ELEMENT, type=T3D2, elset=elsetSpokes2
1104, 1104, 2104
*ELEMENT, type=T3D2, elset=elsetSpokes1
1105, 1105, 2105
*ELEMENT, type=T3D2, elset=elsetSpokes2
1106, 1106, 2106
*ELEMENT, type=T3D2, elset=elsetSpokes1
1107, 1107, 2107
*ELEMENT, type=T3D2, elset=elsetSpokes2
1108, 1108, 2108
*ELEMENT, type=T3D2, elset=elsetSpokes1
1109, 1109, 2109
*ELEMENT, type=T3D2, elset=elsetSpokes2
1110, 1110, 2110
*ELEMENT, type=T3D2, elset=elsetSpokes1
1111, 1111, 2111
*ELEMENT, type=T3D2, elset=elsetSpokes2
1112, 1112, 2112
*ELEMENT, type=T3D2, elset=elsetSpokes1
1113, 1113, 2113
*ELEMENT, type=T3D2, elset=elsetSpokes2
1114, 1114, 2114
*ELEMENT, type=T3D2, elset=elsetSpokes1
1115, 1115, 2115
*ELEMENT, type=T3D2, elset=elsetSpokes2
1116, 1116, 2116
*ELEMENT, type=T3D2, elset=elsetSpokes1
1117, 1117, 2117
*ELEMENT, type=T3D2, elset=elsetSpokes2
1118, 1118, 2118
*ELEMENT, type=T3D2, elset=elsetSpokes1
1119, 1119, 2119
*ELEMENT, type=T3D2, elset=elsetSpokes2
1120, 1120, 2120
*ELEMENT, type=T3D2, elset=elsetSpokes1
1121, 1121, 2121
*ELEMENT, type=T3D2, elset=elsetSpokes2
1122, 1122, 2122
*ELEMENT, type=T3D2, elset=elsetSpokes1
1123, 1123, 2123
*ELEMENT, type=T3D2, elset=elsetSpokes2
1124, 1124, 2124
*ELEMENT, type=T3D2, elset=elsetSpokes1
1125, 1125, 2125
*ELEMENT, type=T3D2, elset=elsetSpokes2
1126, 1126, 2126
*ELEMENT, type=T3D2, elset=elsetSpokes1
1127, 1127, 2127
*ELEMENT, type=T3D2, elset=elsetSpokes2
1128, 1128, 2128
*ELSET, elset=elsetSpokes
elsetSpokes1, elsetSpokes2
*ELSET, elset=elsetSpokesRef, generate
 1001, 1128, 1
** --------------------------------------------------
** -- Sections
** --------------------------------------------------
*PRE-TENSION SECTION, node=99001, element=1001
*PRE-TENSION SECTION, node=99002, element=1002
*PRE-TENSION SECTION, node=99003, element=1003
*PRE-TENSION SECTION, node=99004, element=1004
*PRE-TENSION SECTION, node=99005, element=1005
*PRE-TENSION SECTION, node=99006, element=1006
*PRE-TENSION SECTION, node=99007, element=1007
*PRE-TENSION SECTION, node=99008, element=1008
*PRE-TENSION SECTION, node=99009, element=1009
*PRE-TENSION SECTION, node=99010, element=1010
*PRE-TENSION SECTION, node=99011, element=1011
*PRE-TENSION SECTION, node=99012, element=1012
*PRE-TENSION SECTION, node=99013, element=1013
*PRE-TENSION SECTION, node=99014, element=1014
*PRE-TENSION SECTION, node=99015, element=1015
*PRE-TENSION SECTION, node=99016, element=1016
*PRE-TENSION SECTION, node=99017, element=1017
*PRE-TENSION SECTION, node=99018, element=1018
*PRE-TENSION SECTION, node=99019, element=1019
*PRE-TENSION SECTION, node=99020, element=1020
*PRE-TENSION SECTION, node=99021, element=1021
*PRE-TENSION SECTION, node=99022, element=1022
*PRE-TENSION SECTION, node=99023, element=1023
*PRE-TENSION SECTION, node=99024, element=1024
*PRE-TENSION SECTION, node=99025, element=1025
*PRE-TENSION SECTION, node=99026, element=1026
*PRE-TENSION SECTION, node=99027, element=1027
*PRE-TENSION SECTION, node=99028, element=1028
*PRE-TENSION SECTION, node=99029, element=1029
*PRE-TENSION SECTION, node=99030, element=1030
*PRE-TENSION SECTION, node=99031, element=1031
*PRE-TENSION SECTION, node=99032, element=1032
*PRE-TENSION SECTION, node=99033, element=1033
*PRE-TENSION SECTION, node=99034, element=1034
*PRE-TENSION SECTION, node=99035, element=1035
*PRE-TENSION SECTION, node=99036, element=1036
*PRE-TENSION SECTION, node=99037, element=1037
*PRE-TENSION SECTION, node=99038, element=1038
*PRE-TENSION SECTION, node=99039, element=1039
*PRE-TENSION SECTION, node=99040, element=1040
*PRE-TENSION SECTION, node=99041, element=1041
*PRE-TENSION SECTION, node=99042, element=1042
*PRE-TENSION SECTION, node=99043, element=1043
*PRE-TENSION SECTION, node=99044, element=1044
*PRE-TENSION SECTION, node=99045, element=1045
*PRE-TENSION SECTION, node=99046, element=1046
*PRE-TENSION SECTION, node=99047, element=1047
*PRE-TENSION SECTION, node=99048, element=1048
*PRE-TENSION SECTION, node=99049, element=1049
*PRE-TENSION SECTION, node=99050, element=1050
*PRE-TENSION SECTION, node=99051, element=1051
*PRE-TENSION SECTION, node=99052, element=1052
*PRE-TENSION SECTION, node=99053, element=1053
*PRE-TENSION SECTION, node=99054, element=1054
*PRE-TENSION SECTION, node=99055, element=1055
*PRE-TENSION SECTION, node=99056, element=1056
*PRE-TENSION SECTION, node=99057, element=1057
*PRE-TENSION SECTION, node=99058, element=1058
*PRE-TENSION SECTION, node=99059, element=1059
*PRE-TENSION SECTION, node=99060, element=1060
*PRE-TENSION SECTION, node=99061, element=1061
*PRE-TENSION SECTION, node=99062, element=1062
*PRE-TENSION SECTION, node=99063, element=1063
*PRE-TENSION SECTION, node=99064, element=1064
*PRE-TENSION SECTION, node=99065, element=1065
*PRE-TENSION SECTION, node=99066, element=1066
*PRE-TENSION SECTION, node=99067, element=1067
*PRE-TENSION SECTION, node=99068, element=1068
*PRE-TENSION SECTION, node=99069, element=1069
*PRE-TENSION SECTION, node=99070, element=1070
*PRE-TENSION SECTION, node=99071, element=1071
*PRE-TENSION SECTION, node=99072, element=1072
*PRE-TENSION SECTION, node=99073, element=1073
*PRE-TENSION SECTION, node=99074, element=1074
*PRE-TENSION SECTION, node=99075, element=1075
*PRE-TENSION SECTION, node=99076, element=1076
*PRE-TENSION SECTION, node=99077, element=1077
*PRE-TENSION SECTION, node=99078, element=1078
*PRE-TENSION SECTION, node=99079, element=1079
*PRE-TENSION SECTION, node=99080, element=1080
*PRE-TENSION SECTION, node=99081, element=1081
*PRE-TENSION SECTION, node=99082, element=1082
*PRE-TENSION SECTION, node=99083, element=1083
*PRE-TENSION SECTION, node=99084, element=1084
*PRE-TENSION SECTION, node=99085, element=1085
*PRE-TENSION SECTION, node=99086, element=1086
*PRE-TENSION SECTION, node=99087, element=1087
*PRE-TENSION SECTION, node=99088, element=1088
*PRE-TENSION SECTION, node=99089, element=1089
*PRE-TENSION SECTION, node=99090, element=1090
*PRE-TENSION SECTION, node=99091, element=1091
*PRE-TENSION SECTION, node=99092, element=1092
*PRE-TENSION SECTION, node=99093, element=1093
*PRE-TENSION SECTION, node=99094, element=1094
*PRE-TENSION SECTION, node=99095, element=1095
*PRE-TENSION SECTION, node=99096, element=1096
*PRE-TENSION SECTION, node=99097, element=1097
*PRE-TENSION SECTION, node=99098, element=1098
*PRE-TENSION SECTION, node=99099, element=1099
*PRE-TENSION SECTION, node=99100, element=1100
*PRE-TENSION SECTION, node=99101, element=1101
*PRE-TENSION SECTION, node=99102, element=1102
*PRE-TENSION SECTION, node=99103, element=1103
*PRE-TENSION SECTION, node=99104, element=1104
*PRE-TENSION SECTION, node=99105, element=1105
*PRE-TENSION SECTION, node=99106, element=1106
*PRE-TENSION SECTION, node=99107, element=1107
*PRE-TENSION SECTION, node=99108, element=1108
*PRE-TENSION SECTION, node=99109, element=1109
*PRE-TENSION SECTION, node=99110, element=1110
*PRE-TENSION SECTION, node=99111, element=1111
*PRE-TENSION SECTION, node=99112, element=1112
*PRE-TENSION SECTION, node=99113, element=1113
*PRE-TENSION SECTION, node=99114, element=1114
*PRE-TENSION SECTION, node=99115, element=1115
*PRE-TENSION SECTION, node=99116, element=1116
*PRE-TENSION SECTION, node=99117, element=1117
*PRE-TENSION SECTION, node=99118, element=1118
*PRE-TENSION SECTION, node=99119, element=1119
*PRE-TENSION SECTION, node=99120, element=1120
*PRE-TENSION SECTION, node=99121, element=1121
*PRE-TENSION SECTION, node=99122, element=1122
*PRE-TENSION SECTION, node=99123, element=1123
*PRE-TENSION SECTION, node=99124, element=1124
*PRE-TENSION SECTION, node=99125, element=1125
*PRE-TENSION SECTION, node=99126, element=1126
*PRE-TENSION SECTION, node=99127, element=1127
*PRE-TENSION SECTION, node=99128, element=1128
*SOLID SECTION, elset=elsetSpokes, material=steel1
2.454369e-06
*MATERIAL, name=steel1
*ELASTIC
 2.100000e+11, 0.33
*DENSITY
 8050.0
*DAMPING, alpha=1.000000e+03
*EXPANSION, type=iso
 1.000000e+00
*MATERIAL, name=steel2
*ELASTIC
 2.100000e+11, 0.33
*DENSITY
 8050.0
*DAMPING, alpha=1.000000e+03
*EXPANSION, type=iso
 1.000000e+00
*BEAM GENERAL SECTION, elset=elsetRim, section=GENERAL, density=2700.0
1.0000E-04, 1.5000E-09, 0., 1.5000E-09, 1.2500E-09, 0.0000E+00, 0.0000E+00
0.,0.,-1.
2.0000e+11,      8e+10
** --------------------------------------------------
** -- Boundary conditions
** --------------------------------------------------
*BOUNDARY
 nsetHub, ENCASTRE
** --------------------------------------------------
** -- Pre-load spokes
** --------------------------------------------------
*STEP, name=preT, nlgeom=YES
*STATIC
1., 1., 1e-05, 1.
*CLOAD
 99001, 1, 5.925174e+02
 99002, 1, 5.925174e+02
 99003, 1, 5.925174e+02
 99004, 1, 5.925174e+02
 99005, 1, 5.925174e+02
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 99128, 1, 5.925174e+02
*OUTPUT, field, variable=PRESELECT
*ELEMENT OUTPUT, elset=elsetSpokes
SF
*ELEMENT OUTPUT, elset=elsetRim
SF
*RESTART, write, number interval=1
*END STEP
